*Heading
** Job name: U_elastic_mesh_only Model name: Model-1
** Generated by: Abaqus/CAE 2018
*Preprint, echo=NO, model=NO, history=NO, contact=NO
** ----------------------------------------------------------------
**
** PART INSTANCE: U_elastic
**
*Node
      1,          20.,          20.,           0.
      2,          30.,          20.,           0.
      3,          26.,          25.,           0.
      4,          30.,          25.,           0.
      5,          20.,          25.,           0.
      6,          26.,          45.,           0.
      7,          20.,          45.,           0.
      8,          30.,          45.,           0.
      9,          30.,          50.,           0.
     10,          20.,          50.,           0.
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*Element, type=C3D8
 1,  14,  87, 232,  93,   1,  79,   3,   5
 2,  87,  11,  91, 232,  79,   2,   4,   3
 3,  93, 232, 233,  94,   5,   3,  80,  83
 4, 232,  91,  90, 233,   3,   4,  84,  80
 5,  94, 233, 234,  95,  83,  80,  81,  82
 6, 233,  90,  89, 234,  80,  84,  85,  81
 7,  95, 234, 235,  96,  82,  81,   6,   7
 8, 234,  89,  88, 235,  81,  85,   8,   6
 9,  96, 235,  92,  13,   7,   6,  86,  10
10, 235,  88,  12,  92,   6,   8,   9,  86
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*System
*Nset, nset=all, generate
   1,  285,    1
*Elset, elset=all, generate
   1,  116,    1
*Nset, nset=left
 44, 45, 56, 58
*Elset, elset=left
  84,  95, 100, 113
*Nset, nset=left_lower_datum
 25, 27
*Elset, elset=left_lower_datum
 12, 14, 73, 75
*Nset, nset=left_upper_datum
 26, 28
*Elset, elset=left_upper_datum
 18, 20, 79, 81
*Nset, nset=midplane_xy
   9,  10,  21,  22,  29,  30,  86, 100, 124, 125, 126, 127, 128, 129, 130, 131
 141, 142, 143, 144, 145, 146, 147, 148, 149, 240, 241, 242, 243, 244, 245, 246
 247,
*Elset, elset=midplane_xy, generate
 21,  60,   1
*Nset, nset=right
 38, 39, 47, 48
*Elset, elset=right
  72,  88,  92, 107
*Nset, nset=right_lower_datum
 3, 4
*Elset, elset=right_lower_datum
  2,  4, 67, 69
*Nset, nset=right_upper_datum
 6, 8
*Elset, elset=right_upper_datum
  8, 10, 61, 63
*Elset, elset=_left_inner_S2
 97, 98
*Elset, elset=_left_inner_S6
 83, 85
*Surface, type=ELEMENT, name=left_inner
_left_inner_S2, S2
_left_inner_S6, S6
*Elset, elset=_left_outer_S1
  99, 100
*Elset, elset=_left_outer_S4
 84, 86
*Surface, type=ELEMENT, name=left_outer
_left_outer_S1, S1
_left_outer_S4, S4
*Elset, elset=_right_inner_S2
 105, 106
*Elset, elset=_right_inner_S6
 71,
*Surface, type=ELEMENT, name=right_inner
_right_inner_S2, S2
_right_inner_S6, S6
*Elset, elset=_right_outer_S1
 107, 108
*Elset, elset=_right_outer_S4
 72,
*Surface, type=ELEMENT, name=right_outer
_right_outer_S1, S1
_right_outer_S4, S4

*solid section, elset=all, material=S355
**Properties for S355 are here:
**https://www.sciencedirect.com/science/article/pii/S0141029616301249
*material, name=S355
*elastic, type=iso
2.05E5,0.3
*step
*static
*boundary
left, 1,1,0.600000
left, 2,2,
right, 1,1,-0.600000
right, 2,2,
midplane_xy, 3,3,
*node file, nset=all
U
*el file, elset=all
S
*node print, nset=left_lower_datum
U
*node print, nset=left_upper_datum
U
*node print, nset=right_upper_datum
U
*node print, nset=right_lower_datum
U
*el print, elset=all
S
*endstep
